// SBML level 2 version 4
// dcterms:bibliographicCitation: http://identifiers.org/pubmed/22511268

function function_9(kxd, x, compartment)
  kxd*x/compartment;
end
function_9 is "x Decay";

function function_7(kbd, sigb, compartment)
  kbd*sigb/compartment;
end
function_7 is "sigb Decay";

function function_8(lacz, kzd, kzx, x, compartment)
  lacz*(kzd + kzx*x)/compartment;
end
function_8 is "lacz Decay";

function function_6(kxs, sigb, compartment)
  kxs*sigb/compartment;
end
function_6 is "x Synthesis";

function function_4(IPTG, kbs, compartment)
  IPTG*kbs/compartment;
end
function_4 is "sigb Synthesis";

function function_5(kzs, sigb, compartment)
  kzs*sigb/compartment;
end
function_5 is "lacz Synthesis";

model Model_1()
  // Liebal2012 - B.subtilis post-transcriptional instability model
  // Liebal2012 - B.subtilis post-transcription instability model
  // An important transcription factor of B.subsilis is sigma B . Liebal et al. (2012) have performed experiments in B.subtilis wild type and mutant straits to test and validate a mathematical model of the dynamics of sigma B activity. The following three models were constructed and their ability to fit the experimental data were tested. 1) Transcription inhibition model (MODEL1212180000), 2) sigma B proteolysis model (MODEL1302080000) and 3) Post-transcriptional instability model (MODEL1302080001). This model corresponds to the post-transcription instability model (MODEL1302080001).
  // This model is described in the article:
  // Proteolysis of beta-galactosidase following SigmaB activation in Bacillus subtilis.
  // Liebal UW, Sappa PK, Millat T, Steil L, Homuth G, Völker U, Wolkenhauer O.
  // 2012 Jun;8(6):1806-14.
  // Abstract:
  // In Bacillus subtilis the σ(B) mediated general stress response provides protection against various environmental and energy related stress conditions. To better understand the general stress response, we need to explore the mechanism by which the components interact. Here, we performed experiments in B. subtilis wild type and mutant strains to test and validate a mathematical model of the dynamics of σ(B) activity. In the mutant strain BSA115, σ(B) transcription is inducible by the addition of IPTG and negative control of σ(B) activity by the anti-sigma factor RsbW is absent. In contrast to our expectations of a continuous β-galactosidase activity from a ctc::lacZ fusion, we observed a transient activity in the mutant. To explain this experimental finding, we constructed mathematical models reflecting different hypotheses regarding the regulation of σ(B) and β-galactosidase dynamics. Only the model assuming instability of either ctc::lacZ mRNA or β-galactosidase protein is able to reproduce the experiments in silico. Subsequent Northern blot experiments revealed stable high-level ctc::lacZ mRNA concentrations after the induction of the σ(B) response. Therefore, we conclude that protein instability following σ(B) activation is the most likely explanation for the experimental observations. Our results thus support the idea that B. subtilis increases the cytoplasmic proteolytic degradation to adapt the proteome in face of environmental challenges following activation of the general stress response. The findings also have practical implications for the analysis of stress response dynamics using lacZ reporter gene fusions, a frequently used strategy for the σ(B) response.
  // Figure 3a of the reference article has been reproduced. beta-galactosidase (lacz in model) activity at different concentrations of IPTG (100M, 200M and 1000M) has been reproduced. SED-ML (Simulation Experiment Description Markup Language) file is available for this model (see curation tab).
  // This model is hosted on BioModels Database and identified by: MODEL1302080001 .
  // To cite BioModels Database, please use: BioModels Database: An enhanced, curated and annotated resource for published quantitative kinetic models .
  // To the extent possible under law, all copyright and related or neighbouring rights to this encoded model have been dedicated to the public domain worldwide. Please refer to CC0 Public Domain Dedication for more information.
  // hasProperty GO:0030162
  // biomodels.db:MODEL1302080001
  // biomodels.db:BIOMD0000000459
  // occursIn taxonomy:1423
  // isDescribedBy pubmed:22511268

  // Compartments:
  compartment compartment = 1;  // O:0005623

  // Species:
  species $IPTG in compartment = 100;  // CHEBI:61448
  species sigb in compartment = 0;  // interpro:IPR006288
  species lacz in compartment = 0;  // O:0015925
  species x in compartment = 0;  // CHEBI:35222

  // Parameters:
  kbd = 0.0164812;  // O:0006508
  kbs = 100;  // O:0009058
  kxd = 1.08559e-9;  // O:0006508
  kxs = 9.32517e-8;  // O:0009058
  kzd = 1.34615e-7;  // O:0006508
  kzs = 9.03538e-7;  // O:0009058
  kzx = 0.00317772;  // CHEBI:35222

  // Reactions:
  v1: => sigb; compartment*function_4(IPTG, kbs, compartment); v1 is "sigb Synthesis";  // modifiers: IPTG; O:0006508; O:0009058
  v2: => lacz; compartment*function_5(kzs, sigb, compartment); v2 is "lacz Synthesis";  // modifiers: sigb; O:0006508; O:0009058
  v3: => x; compartment*function_6(kxs, sigb, compartment); v3 is "x Synthesis";  // modifiers: sigb; O:0006508; O:0009058
  reaction_1: sigb => ; compartment*function_7(kbd, sigb, compartment); reaction_1 is "sigb Decay";
  reaction_2: lacz => ; compartment*function_8(lacz, kzd, kzx, x, compartment); reaction_2 is "lacz Decay";  // modifiers: x
  reaction_3: x => ; compartment*function_9(kxd, x, compartment); reaction_3 is "x Decay";
end
